// SBML level 2 version 4

model testModel()

  // Compartments:
  compartment ATM;

  // Species:
  species IR in ATM;
  species TNF in ATM;
  species siR in ATM;
  species NAa20 in ATM;
  species NAatm in ATM;
  species NAbax in ATM;
  species NAchk2 in ATM;
  species NAikba in ATM;
  species NAmdm2 in ATM;
  species NAp53 in ATM;
  species NApten in ATM;
  species NAwip1 in ATM;
  species AKTtot in ATM;
  species CREBtot in ATM;
  species KMRNtot in ATM;
  species KSRPtot in ATM;
  species PIPtot in ATM;
  species kv in ATM;
  species pa1 in ATM;
  species pa2 in ATM;
  species pa3 in ATM;
  species pa4 in ATM;
  species pa5 in ATM;
  species pa6 in ATM;
  species pa7 in ATM;
  species pa8 in ATM;
  species pa9 in ATM;
  species pc1 in ATM;
  species pc2 in ATM;
  species pc3 in ATM;
  species pc4 in ATM;
  species pd1 in ATM;
  species pd2 in ATM;
  species pd3 in ATM;
  species pd4 in ATM;
  species pd5 in ATM;
  species pd6 in ATM;
  species pd7 in ATM;
  species pd8 in ATM;
  species pd9 in ATM;
  species pd10 in ATM;
  species pd11 in ATM;
  species pi1 in ATM;
  species pm1 in ATM;
  species pm2 in ATM;
  species pm3 in ATM;
  species pq1 in ATM;
  species pq2 in ATM;
  species pq3 in ATM;
  species pq4 in ATM;
  species ps1 in ATM;
  species ps2 in ATM;
  species ps3 in ATM;
  species pt1 in ATM;
  species pt2 in ATM;
  species pt3 in ATM;
  species M in ATM;
  species na1 in ATM;
  species na2 in ATM;
  species na3 in ATM;
  species na4 in ATM;
  species na5 in ATM;
  species na6 in ATM;
  species na7 in ATM;
  species nc1 in ATM;
  species nc2 in ATM;
  species nc3 in ATM;
  species nd1 in ATM;
  species nd2 in ATM;
  species nd3 in ATM;
  species nd4 in ATM;
  species ne1 in ATM;
  species ne2 in ATM;
  species ni1 in ATM;
  species ni2 in ATM;
  species nk1 in ATM;
  species nk2 in ATM;
  species nm2 in ATM;
  species nm3 in ATM;
  species nm4 in ATM;
  species nq1 in ATM;
  species nq2 in ATM;
  species ns1 in ATM;
  species nt1 in ATM;
  species ma1 in ATM;
  species ma2 in ATM;
  species ma3 in ATM;
  species ma4 in ATM;
  species ma5 in ATM;
  species ma6 in ATM;
  species ma7 in ATM;
  species mc1 in ATM;
  species mc2 in ATM;
  species mc3 in ATM;
  species mc4 in ATM;
  species mc5 in ATM;
  species md1 in ATM;
  species md2 in ATM;
  species md3 in ATM;
  species md4 in ATM;
  species mm1 in ATM;
  species mm2 in ATM;
  species mm3 in ATM;
  species mq1 in ATM;
  species mq2 in ATM;
  species mq3 in ATM;
  species ms1 in ATM;
  species ms2 in ATM;
  species mt1 in ATM;
  species mt2 in ATM;
  species wa1 in ATM;
  species wa2 in ATM;
  species wc1 in ATM;
  species wd1 in ATM;
  species wd2 in ATM;
  species wd3 in ATM;
  species wd4 in ATM;
  species wd5 in ATM;
  species wd6 in ATM;
  species we1 in ATM;
  species wi1 in ATM;
  species wq1 in ATM;
  species ws1 in ATM;
  species ws2 in ATM;
  species wt1 in ATM;
  species bd1 in ATM;
  species bd2 in ATM;
  species bs1 in ATM;
  species bt1 in ATM;
  species bd3 in ATM;
  species bd4 in ATM;
  species bs2 in ATM;
  species bt2 in ATM;
  species NAp21 in ATM;
  species nt1a in ATM;
  species pq5 in ATM;
  species nm1 in ATM;
  species Gp53 in ATM;
  species P53t in ATM;
  species P53 in ATM;
  species P53p in ATM;
  species Gmdm2 in ATM;
  species MDM2t in ATM;
  species MDM2 in ATM;
  species MDM2p in ATM;
  species MDM2n in ATM;
  species MDM2ppn in ATM;
  species Gpten in ATM;
  species PTENt in ATM;
  species PTEN in ATM;
  species PIP3 in ATM;
  species AKTa in ATM;
  species NFKB in ATM;
  species NFKBn in ATM;
  species IKBANFKB in ATM;
  species IKBApNFKB in ATM;
  species IKBAnNFKBn in ATM;
  species Gikba in ATM;
  species IKBAt in ATM;
  species IKBA in ATM;
  species IKBAp in ATM;
  species IKBAn in ATM;
  species Ga20 in ATM;
  species A20t in ATM;
  species A20 in ATM;
  species IKKK in ATM;
  species IKKKa in ATM;
  species IKK in ATM;
  species IKKa in ATM;
  species IKKi in ATM;
  species IKKii in ATM;
  species Ra in ATM;
  species DSB in ATM;
  species Gatm in ATM;
  species ATMt in ATM;
  species ATMn in ATM;
  species ATMpn in ATM;
  species ATMan in ATM;
  species Gchk2 in ATM;
  species CHK2t in ATM;
  species CHK2n in ATM;
  species CHK2pn in ATM;
  species KMRNpn in ATM;
  species CREBpn in ATM;
  species Gwip1 in ATM;
  species WIP1t in ATM;
  species WIP1n in ATM;
  species KSRPa in ATM;
  species KSRPn in ATM;
  species PreMiR16 in ATM;
  species MiR16 in ATM;
  species Gbax in ATM;
  species BAXt in ATM;
  species BAX in ATM;
  species AP in ATM;
  species Gp21 in ATM;
  species P21 in ATM;
  species P21t in ATM;
  species CCB in ATM;
  species CCBtmp in ATM;
  species CCB2 in ATM;
  species CCBtmp2 in ATM;

  // Rate rules:
  Gp53' = (pq1 + nq1*NFKBn*nm1/(nm1 + WIP1n))*(NAp53 - Gp53) - (pq5 + 0*nq2*IKBAn)*Gp53;
  P53t' = ps1*Gp53 - pd1*P53t;
  P53' = pt1*P53t + pc1*P53p*WIP1n - (pa1 + pa2*ATMan/(ATMan + pm1) + pa3*CHK2pn/(CHK2pn + pm2))*P53 - (pd2 + pd3*MDM2n^2)*P53;
  P53p' = (pa1 + pa2*ATMan/(ATMan + pm1) + pa3*CHK2pn/(CHK2pn + pm2))*P53 - pc1*P53p*WIP1n - (pd4 + pd5*MDM2n^2)*P53p;
  Gmdm2' = (pq2 + pq3*P53p^2)*(NAmdm2 - Gmdm2) - pq4*Gmdm2;
  MDM2t' = ps2*Gmdm2 - pd6*MDM2t;
  MDM2' = pt2*MDM2t + pc2*MDM2p - pa4*MDM2*AKTa - (pd7 + pd9*(CHK2pn/(CHK2pn + pm2)))*MDM2;
  MDM2p' = pa4*MDM2*AKTa - pc2*MDM2p - pi1*MDM2p - (pd8 + pd9*CHK2pn/(CHK2pn + pm2))*MDM2p;
  MDM2n' = pi1*MDM2p + pa5*WIP1n*MDM2ppn - (pd8 + pd9*kv*(CHK2pn/(CHK2pn + pm2)))*MDM2n - pa6*MDM2n*ATMan;
  MDM2ppn' = pa6*MDM2n*ATMan - (pd8 + pd9*kv*CHK2pn/(CHK2pn + pm2))*MDM2ppn - pa5*WIP1n*MDM2ppn;
  Gpten' = (pq2 + pq3*P53p^2)*(NApten - Gpten) - pq4*Gpten;
  PTENt' = ps3*Gpten - pd10*PTENt;
  PTEN' = pt3*PTENt - pd11*PTEN;
  PIP3' = pa7*(PIPtot - PIP3) - pc3*PTEN*PIP3;
  AKTa' = pa8*PIP3*(1 + pa9*ATMan)*(AKTtot - AKTa) - pc4*AKTa;
  NFKB' = nk1*IKBANFKB + nd1*IKBApNFKB - nk2*NFKB*IKBA - ni1*NFKB;
  NFKBn' = ni1*NFKB - nk2*kv*NFKBn*IKBAn;
  IKBANFKB' = nk2*NFKB*IKBA + ne2*IKBAnNFKBn - nk1*IKBANFKB - na1*IKKa*IKBANFKB;
  IKBApNFKB' = na1*IKKa*IKBANFKB - nd1*IKBApNFKB;
  IKBAnNFKBn' = nk2*kv*NFKBn*IKBAn - ne2*IKBAnNFKBn;
  Gikba' = nq1*NFKBn*(NAikba - Gikba)*nm1/(nm1 + WIP1n) - nq2*IKBAn*Gikba;
  IKBAt' = ns1*Gikba*pm3/(pm3 + P53p) - nd2*IKBAt;
  IKBA' = nt1*IKBAt + ne1*IKBAn - na2*IKKa*IKBA - nk2*NFKB*IKBA - nd3*IKBA - ni2*IKBA;
  IKBAp' = na2*IKKa*IKBA - nd1*IKBAp;
  IKBAn' = ni2*IKBA - nk2*kv*NFKBn*IKBAn - ne1*IKBAn;
  Ga20' = nq1*NFKBn*(NAa20 - Ga20)*nm1/(nm1 + WIP1n) - nq2*IKBAn*Ga20;
  A20t' = ns1*Ga20*pm3/(pm3 + P53p) - nd2*A20t;
  A20' = nt1a*A20t - nd4*A20;
  IKKK' = nc1*IKKKa - na3*Ra*IKKK*nm2/(nm2 + nm3*A20);
  IKKKa' = na3*Ra*IKKK*nm2/(nm2 + nm3*A20) - nc1*IKKKa;
  IKK' = na4*IKKii - (na5*IKKKa + na6*ATMan)*IKK;
  IKKa' = (na5*IKKKa + na6*ATMan)*IKK - nc2*IKKa*(nm4 + A20)/nm4;
  IKKi' = nc2*IKKa*(nm4 + A20)/nm4 - na4*IKKi;
  IKKii' = na4*IKKi - na4*IKKii;
  Ra' = na7*(M - Ra)*TNF - nc3*Ra;
  DSB' = ma1*IR + ma2*AP - mc1*DSB/(DSB + mm1)*(pq2 + pq3*P53p^2)/(pq4 + pq2 + pq3*P53p^2);
  Gatm' = (mq1 + pq3*P53p^2 + mq2*CREBpn)*(NAatm - Gatm) - mq3*Gatm;
  ATMt' = ms1*Gatm - md1*ATMt;
  ATMn' = mt1*ATMt + mc2*WIP1n*ATMpn - ATMn*ma3*DSB/(DSB + mm2) - md2*ATMn;
  ATMpn' = ATMn*ma3*DSB/(DSB + mm2) + mc2*WIP1n*ATMan - ma4*ATMpn*KMRNpn - mc2*WIP1n*ATMpn - md2*ATMpn;
  ATMan' = ma4*ATMpn*KMRNpn - mc2*WIP1n*ATMan - md2*ATMan;
  Gchk2' = mq1*(NAchk2 - Gchk2) - mq3*Gchk2;
  CHK2t' = ms2*Gchk2*pm3/(pm3 + P53p) - md3*CHK2t;
  CHK2n' = mt2*CHK2t + mc3*WIP1n*CHK2pn - ma5*ATMan*CHK2n - md4*CHK2n;
  CHK2pn' = ma5*ATMan*CHK2n - mc3*WIP1n*CHK2pn - md4*CHK2pn;
  KMRNpn' = (ma6*ATMpn + ma7*DSB/(DSB + mm3))*(KMRNtot - KMRNpn) - mc4*KMRNpn;
  CREBpn' = ma5*ATMan*(CREBtot - CREBpn) - mc5*CREBpn;
  Gwip1' = (pq2 + pq3*P53p^2 + mq2*CREBpn + nq1*NFKBn*nm1/(nm1 + WIP1n))*(NAwip1 - Gwip1) - wq1*Gwip1;
  WIP1t' = ws1*Gwip1 - (wd1 + siR*wd2 + wd3*MiR16)*WIP1t;
  WIP1n' = wt1*WIP1t - wd4*WIP1n;
  KSRPa' = wa1*ATMan*(KSRPtot - KSRPa - KSRPn) + we1*KSRPn - wc1*KSRPa - wi1*KSRPa;
  KSRPn' = wi1*KSRPa - we1*KSRPn;
  PreMiR16' = ws2*KSRPn - wd5*PreMiR16;
  MiR16' = wa2*PreMiR16 - wd6*MiR16;
  Gbax' = (pq2 + pq3*P53p^2)*(NAbax - Gbax) - pq4*Gbax;
  BAXt' = bs1*Gbax - bd1*BAXt;
  BAX' = bt1*BAXt - bd2*BAX;
  AP' = ;
  Gp21' = (pq2 + pq3*P53p^2)*(NAp21 - Gp21) - pq4*Gp21;
  P21t' = bs2*Gp21 - bd3*P21t;
  P21' = bt2*P21t - bd4*P21;
  CCBtmp' = ;
  CCB' = ;
  CCBtmp2' = ;
  CCB2' = ;
end
